# OpenSim document version 30000
ScaleTool gait_reduced_nonscaled-scaled:
  mass: 62.3 [kg]
  height: -1
  age: -1
  GenericModelMaker:
    model_file: subject01.osim
    marker_set_file: markers.xml
  ModelScaler:
    apply: true
    scaling_order: measurements
    marker_file: Run_50002.trc
    time_range: 0 0.02
    preserve_mass_distribution: false
    output_model_file: subject01_scaled_v191.osim
    MeasurementSet:
      Measurement thigh_r: apply=true
        MarkerPair: markers=(rl_knee r_troch)
        BodyScale femur_r: axes=(X Y Z)
        BodyScale femur_l: axes=(X Y Z)
      Measurement foot_r: apply=true
        MarkerPair: markers=(r_heel r_metatarsal1)
        BodyScale talus_r: axes=(X Y Z)
        BodyScale calcn_r: axes=(X Y Z)
        BodyScale toes_r: axes=(X Y Z)
        BodyScale talus_l: axes=(X Y Z)
        BodyScale calcn_l: axes=(X Y Z)
        BodyScale toes_l: axes=(X Y Z)
      Measurement torso: apply=true
        MarkerPair: markers=(r_shoulder l_shoulder)
        BodyScale torso: axes=(X Y Z)
      Measurement pelvis: apply=true
        MarkerPair: markers=(sacrum neck)
        BodyScale pelvis: axes=(X Y Z)
      Measurement humerus_r: apply=true
        MarkerPair: markers=(r_shoulder rl_elbow)
        BodyScale humerus_r: axes=(X Y Z)
        BodyScale humerus_l: axes=(X Y Z)
      Measurement forearm_r: apply=true
        MarkerPair: markers=(r_hand rl_wrist)
        BodyScale hand_r: axes=(X Y Z)
        BodyScale hand_l: axes=(X Y Z)
      Measurement shank_r: apply=true
        MarkerPair: markers=(rl_knee rl_ankle)
        BodyScale tibia_r: axes=(X Y Z)
        BodyScale tibia_l: axes=(X Y Z)
      Measurement radius_r: apply=true
        MarkerPair: markers=(rl_elbow rl_wrist)
        BodyScale ulna_r: axes=(X Y Z)
        BodyScale radius_r: axes=(X Y Z)
        BodyScale ulna_l: axes=(X Y Z)
        BodyScale radius_l: axes=(X Y Z)
  MarkerPlacer:
    apply: true
    marker_file: Run_50002.trc
    time_range: 0 0.02
    output_model_file: subject01_scaled_v191.osim
    max_marker_movement: -1
    IKTaskSet:
      IKMarkerTask Neck: apply=true weight=1
      IKMarkerTask Back_down: apply=true weight=1
      IKMarkerTask r_humerus2: apply=true weight=1
      IKMarkerTask r_humerus3: apply=true weight=1
      IKMarkerTask r_humerus1: apply=true weight=1
      IKMarkerTask rl_elbow: apply=true weight=1
      IKMarkerTask rm_elbow: apply=true weight=1
      IKMarkerTask r_radius1: apply=true weight=1
      IKMarkerTask r_radius3: apply=true weight=1
      IKMarkerTask r_radius2: apply=true weight=1
      IKMarkerTask rm_wrist: apply=true weight=1
      IKMarkerTask rl_wrist: apply=true weight=1
      IKMarkerTask r_hand: apply=true weight=1
      IKMarkerTask l_humerus2: apply=true weight=1
      IKMarkerTask l_humerus3: apply=true weight=1
      IKMarkerTask l_humerus1: apply=true weight=1
      IKMarkerTask ll_elbow: apply=true weight=1
      IKMarkerTask lm_elbow: apply=true weight=1
      IKMarkerTask l_radius1: apply=true weight=1
      IKMarkerTask l_radius3: apply=true weight=1
      IKMarkerTask l_radius2: apply=true weight=1
      IKMarkerTask lm_wrist: apply=true weight=1
      IKMarkerTask ll_wrist: apply=true weight=1
      IKMarkerTask l_hand: apply=true weight=1
      IKMarkerTask r_shoulder: apply=true weight=1
      IKMarkerTask l_shoulder: apply=true weight=1
      IKMarkerTask Head_up: apply=true weight=1
      IKMarkerTask r_asis: apply=true weight=1
      IKMarkerTask l_asis: apply=true weight=1
      IKMarkerTask Sacrum: apply=true weight=1
      IKMarkerTask r_thigh2: apply=true weight=1
      IKMarkerTask r_thigh3: apply=true weight=1
      IKMarkerTask rl_knee: apply=true weight=1
      IKMarkerTask rm_knee: apply=true weight=1
      IKMarkerTask r_shank1: apply=true weight=1
      IKMarkerTask r_shank4: apply=true weight=1
      IKMarkerTask rl_ankle: apply=true weight=1
      IKMarkerTask rm_ankle: apply=true weight=1
      IKMarkerTask r_heel: apply=true weight=1
      IKMarkerTask r_metatarsal5: apply=true weight=1
      IKMarkerTask r_metatarsal1: apply=true weight=1
      IKMarkerTask l_thigh2: apply=true weight=1
      IKMarkerTask l_thigh3: apply=true weight=1
      IKMarkerTask ll_knee: apply=true weight=1
      IKMarkerTask lm_knee: apply=true weight=1
      IKMarkerTask l_shank1: apply=true weight=1
      IKMarkerTask l_shank4: apply=true weight=1
      IKMarkerTask ll_ankle: apply=true weight=1
      IKMarkerTask lm_ankle: apply=true weight=1
      IKMarkerTask l_heel: apply=true weight=1
      IKMarkerTask l_metatarsal5: apply=true weight=1
      IKMarkerTask l_metatarsal1: apply=true weight=1
      IKMarkerTask l_shank2: apply=true weight=1
      IKMarkerTask l_shank3: apply=true weight=1
      IKMarkerTask r_shank2: apply=true weight=1
      IKMarkerTask r_shank3: apply=true weight=1
      IKMarkerTask r_thigh1: apply=true weight=1
      IKMarkerTask r_thigh4: apply=true weight=1
      IKMarkerTask l_thigh1: apply=true weight=1
      IKMarkerTask l_thigh4: apply=true weight=1
      IKMarkerTask r_psis: apply=true weight=1
      IKMarkerTask l_psis: apply=true weight=1
      IKMarkerTask l_illac: apply=true weight=1
      IKMarkerTask r_illac: apply=true weight=1
      IKMarkerTask l_troch: apply=true weight=1
      IKMarkerTask r_troch: apply=true weight=1
      IKMarkerTask back_left: apply=true weight=1
      IKMarkerTask back_right: apply=true weight=1
