# OpenSim document version 30000
InverseKinematicsTool:
  results_directory: ./
  model_file: subject01_scaled_v191.osim
  constraint_weight: 20
  accuracy: 1e-5
  marker_file: Run_50002.trc
  time_range: 0 14.9975
  report_errors: true
  output_motion_file: Run_50002.mot
  report_marker_locations: false
  IKTaskSet:
    IKMarkerTask neck: apply=true weight=1
    IKMarkerTask back_down: apply=true weight=1
    IKMarkerTask r_humerus2: apply=true weight=1
    IKMarkerTask r_humerus3: apply=true weight=1
    IKMarkerTask r_humerus1: apply=true weight=1
    IKMarkerTask rl_elbow: apply=true weight=1
    IKMarkerTask rm_elbow: apply=true weight=1
    IKMarkerTask r_radius1: apply=true weight=1
    IKMarkerTask r_radius3: apply=true weight=1
    IKMarkerTask r_radius2: apply=true weight=1
    IKMarkerTask rm_wrist: apply=true weight=1
    IKMarkerTask rl_wrist: apply=true weight=1
    IKMarkerTask r_hand: apply=true weight=1
    IKMarkerTask l_humerus2: apply=true weight=1
    IKMarkerTask l_humerus3: apply=true weight=1
    IKMarkerTask l_humerus1: apply=true weight=1
    IKMarkerTask ll_elbow: apply=true weight=1
    IKMarkerTask lm_elbow: apply=true weight=1
    IKMarkerTask l_radius1: apply=true weight=1
    IKMarkerTask l_radius3: apply=true weight=1
    IKMarkerTask l_radius2: apply=true weight=1
    IKMarkerTask lm_wrist: apply=true weight=1
    IKMarkerTask ll_wrist: apply=true weight=1
    IKMarkerTask l_hand: apply=true weight=1
    IKMarkerTask r_shoulder: apply=true weight=0.5
    IKMarkerTask l_shoulder: apply=true weight=0.5
    IKMarkerTask head_up: apply=true weight=0.1
    IKMarkerTask r_asis: apply=true weight=10
    IKMarkerTask r_illiac: apply=true weight=7
    IKMarkerTask l_asis: apply=true weight=10
    IKMarkerTask l_illiac: apply=true weight=7
    IKMarkerTask sacrum: apply=true weight=10
    IKMarkerTask r_thigh2: apply=true weight=1
    IKMarkerTask r_thigh3: apply=true weight=1
    IKMarkerTask rl_knee: apply=true weight=1
    IKMarkerTask rm_knee: apply=true weight=1
    IKMarkerTask r_shank1: apply=true weight=1
    IKMarkerTask r_shank4: apply=true weight=1
    IKMarkerTask rl_ankle: apply=true weight=1
    IKMarkerTask rm_ankle: apply=true weight=1
    IKMarkerTask r_heel: apply=true weight=10
    IKMarkerTask r_metatarsal5: apply=true weight=5
    IKMarkerTask r_metatarsal1: apply=true weight=5
    IKMarkerTask l_thigh2: apply=true weight=1
    IKMarkerTask l_thigh3: apply=true weight=1
    IKMarkerTask ll_knee: apply=true weight=1
    IKMarkerTask lm_knee: apply=true weight=1
    IKMarkerTask l_shank1: apply=true weight=1
    IKMarkerTask l_shank4: apply=true weight=1
    IKMarkerTask ll_ankle: apply=true weight=1
    IKMarkerTask lm_ankle: apply=true weight=1
    IKMarkerTask l_heel: apply=true weight=10
    IKMarkerTask l_metatarsal5: apply=true weight=5
    IKMarkerTask l_metatarsal1: apply=true weight=5
    IKCoordinateTask subtalar_angle_r: apply=true weight=1000 value_type=default_value value=0
    IKCoordinateTask mtp_angle_r: apply=true weight=1000 value_type=default_value value=0
    IKCoordinateTask subtalar_angle_l: apply=true weight=1000 value_type=default_value value=0
    IKCoordinateTask mtp_angle_l: apply=true weight=1000 value_type=default_value value=0
