# OpenSim document version 30000
AnalyzeTool Run_50002_analyze_:
  model_file: subject01_scaled_v191.osim
  replace_force_set: false
  output_precision: 8
  initial_time: 0
  final_time: 99.99
  solve_for_equilibrium_for_auxiliary_states: false
  maximum_number_of_integrator_steps: 20000
  maximum_integrator_step_size: 1
  minimum_integrator_step_size: 1e-8
  integrator_error_tolerance: 1e-5
  external_loads_file: run5_external_forces.xml
  coordinates_file: Run_50002.mot
  lowpass_cutoff_frequency_for_coordinates: 6
  AnalysisSet Analyses:
    BodyKinematics: start_time=0 end_time=99.99 step_interval=1 in_degrees=true bodies=all
        express_results_in_body_local_frame=false
